** CPFEM UMAT test on CPEG elements
*include, input=mesh_Xelement.inp
*include, input=mat_params.inp
*include, input=mat_orient.inp
*SOLID SECTION, ELSET=All, MATERIAL=CRYSTAL_Orient0
**
*Equation
5
T1,         2, 1
T2,         2, 1
T3,         2, 1
T4,         2, 1
RP-Top,     2, -4
5
B1,         2, 1
B2,         2, 1
B3,         2, 1
B4,         2, 1
RP-Bottom,  2, -4
**
******************** Load step follows *****************************
**
*RESTART,WRITE,FREQUENCY=10
**
*STEP, name=Loading, INC=100000, NLGEOM, unsymm=YES
*STATIC
1E-9, 1.0, 1E-9, 1E-3
*Boundary
   Backends, 3, 3, 0
   Origin, 1, 1, 0
   RP-Bottom, 2, 2, 0
   RP-Top, 2, 2, 0.5
*Output, field, Number interval=100, Time Marks=No
*Node output
RF, U
*Element Output, directions=YES
LE, PE, PEEQ, S, SDV, COORD
*END STEP
